OpenVSP model (file version 5), 17 components.
Geometry view with OpenVSP parameter names; values to 6 digits, angles in degrees, lengths in the model's unit.
Overall bounding box: X_Min=-0.421855 X_Len=5.48251 Y_Min=-3.36111 Y_Len=6.72222 Z_Min=-2.77667 Z_Len=5.52169

Wing "Horizontal Wing"
  location (X Y Z) 2.65 0 0, rotation 0 0 0
  symmetric about XZ
  bounding box size 0.55 6.5 0.160061
  totals: TotalSpan=6.5 TotalProjectedSpan=6.5 TotalChord=0.325 TotalArea=2.1125 TotalAR=20
  root: chord 0.55, twist 0, NACA 4-series Camber=0 CamberLoc=0.2 ThickChord=0.290909
  sections:
    n  Span   Root_Chord  Tip_Chord  Area     Sweep  Sweep_Location  Dihedral  Twist  Twist_Location  tip airfoil
    1  1.625  0.55        0.25       0.65     0      0.6             0         0      0.25            NACA 4-series Camber=0 CamberLoc=0.2 ThickChord=0.1
    2  1.625  0.25        0.25       0.40625  0      0               0         0      0.25            as above

Pod "Middle Prop Mounts", child of "Horizontal Wing"
  location (X Y Z) 2.5 1.75 0, rotation 0 0 0
  symmetric about XZ
  bounding box size 1 3.78571 0.285714
  Design: FineRatio=7 Length=1

Propeller "Middle Props", child of "Middle Prop Mounts"
  location (X Y Z) 2.5 -1.75 0, rotation 0 0 0
  symmetric about XZ
  bounding box size 0 5.14 1.64
  Design: Diameter=1.64 NumBlade=3 Beta34=20 UseBeta34Flag=1 Feather=0 Rotate=0 Precone=0 ReverseFlag=0 FoldAngle=0 PropMode=2 AF=152.069 CLi=0.538182 Chord=0.173625 Solidity=0.1658 ConstructXoC=0 FeatherAxisXoC=0.5 FeatherOffsetXoC=0
  cross sections:
    n  RadiusFrac  shape
    0  0           ellipse Ellipse_Height=0.0328 Ellipse_Width=0.0656
    1  0.4         NACA 16-series Chord=0.151244 IdealCl=0.7 ThickChord=0.144074
    2  1           NACA 16-series Chord=0.1066 IdealCl=0.2 ThickChord=0.03
  Chord along r/R (cubic Bezier): 0: 0.08, 0.2: 0.15, 0.4: 0.2, 0.6: 0.2, 0.716667: 0.2, 0.833333: 0.2, 0.95: 0.2, 0.966667: 0.2, 0.983333: 0.2, 1: 0.13
  Twist along r/R (PCHIP): 0: 46.75, 0.75: 20, 1: 13
  Thick along r/R (cubic Bezier): 0: 0.5, 0.1: 0.3, 0.2: 0.225, 0.3: 0.2, 0.4: 0.125, 0.5: 0.115, 0.6: 0.1, 0.733333: 0.075, 0.866667: 0.055, 1: 0.03
  CLI along r/R (cubic Bezier): 0: 0, 0.133333: 0.7, 0.266667: 0.7, 0.4: 0.7, 0.466667: 0.7, 0.533333: 0.7, 0.6: 0.7, 0.733333: 0.7, 0.866667: 0.7, 1: 0.2

Pod "Outer Pod", child of "Horizontal Wing"
  location (X Y Z) 2.15 3.25 0, rotation 0 0 0; relative location -0.5 3.25 0, rotation 0 0 0
  symmetric about XZ
  bounding box size 1 6.72222 0.222222
  Design: FineRatio=9 Length=1

Wing "Upper Wing"
  location (X Y Z) 2.45 0 0, rotation 55 0 0
  symmetric about XZ
  bounding box size 2.25853 2.33434 2.71986
  totals: TotalSpan=6.1 TotalProjectedSpan=5.71949 TotalChord=0.425 TotalArea=2.74 TotalAR=11.9389
  root: chord 0.55, twist 0, NACA 4-series Camber=0 CamberLoc=0.2 ThickChord=0.2
  sections:
    n  Span  Root_Chord  Tip_Chord  Area  Sweep  Sweep_Location  Dihedral  Twist  Twist_Location  tip airfoil
    1  2     0.55        0.4        0.95  26     1               0         0      0.25            NACA 4-series Camber=0 CamberLoc=0.2 ThickChord=0.1
    2  0.8   0.4         0.4        0.32  42.5   0               35.0455   0      0.25            as above
    3  0.25  0.4         0.4        0.1   -45    1               35        0      0.25            as above

Pod "Upper Prop Mounts", child of "Upper Wing"
  location (X Y Z) 3.5 -1.15 1.6, rotation 0 0 0
  symmetric about XZ
  bounding box size 1 2.58571 0.285714
  Design: FineRatio=7 Length=1

Propeller "Upper Props", child of "Upper Prop Mounts"
  location (X Y Z) 3.5 1.15 1.6, rotation 0 45 15
  symmetric about XZ
  bounding box size 1.32531 3.88412 1.32531
  Design: Diameter=1.64 NumBlade=3 Beta34=20 UseBeta34Flag=1 Feather=0 Rotate=0 Precone=0 ReverseFlag=0 FoldAngle=0 PropMode=2 AF=152.507 CLi=0.54059 Chord=0.173625 Solidity=0.1658 ConstructXoC=0.5 FeatherAxisXoC=0.5 FeatherOffsetXoC=0
  cross sections:
    n  RadiusFrac  shape
    0  0           ellipse Ellipse_Height=0.0328 Ellipse_Width=0.0656
    1  0.4         NACA 16-series Chord=0.151244 IdealCl=0.7 ThickChord=0.144074
    2  1           NACA 16-series Chord=0.1066 IdealCl=0.2 ThickChord=0.03
  blade curves as in "Middle Props"

Wing "Lower Wing"
  location (X Y Z) 2.75 0.3 0, rotation -75 0 0
  symmetric about XZ
  bounding box size 2.60854 2.27219 2.70804
  totals: TotalSpan=5.6 TotalProjectedSpan=5.59239 TotalChord=0.4625 TotalArea=2.77 TotalAR=11.2905
  root: chord 0.75, twist 0, NACA 4-series Camber=0 CamberLoc=0.2 ThickChord=0.2
  sections:
    n  Span  Root_Chord  Tip_Chord  Area   Sweep  Sweep_Location  Dihedral  Twist  Twist_Location  tip airfoil
    1  1.8   0.75        0.4        1.035  -37.5  0               0         0      0.25            NACA 4-series Camber=0 CamberLoc=0.2 ThickChord=0.1
    2  1     0.4         0.3        0.35   -30    1               5         0      0.25            NACA 4-series Camber=0 CamberLoc=0.2 ThickChord=0.2

Pod "Lower Prop Mounts", child of "Lower Wing"
  location (X Y Z) 1.25 0.775 -1.74, rotation 0 0 0
  symmetric about XZ
  bounding box size 1 1.83571 0.285714
  Design: FineRatio=7 Length=1

Propeller "Lower Props", child of "Lower Prop Mounts"
  location (X Y Z) 1.25 0.775 -1.74, rotation 0 30 -30
  symmetric about XZ
  bounding box size 1.21194 2.97028 1.64657
  Design: Diameter=1.64 NumBlade=3 Beta34=20 UseBeta34Flag=1 Feather=0 Rotate=0 Precone=0 ReverseFlag=0 FoldAngle=0 PropMode=2 AF=152.507 CLi=0.54059 Chord=0.173625 Solidity=0.1658 ConstructXoC=0.5 FeatherAxisXoC=0.5 FeatherOffsetXoC=0
  cross sections:
    n  RadiusFrac  shape
    0  0           ellipse Ellipse_Height=0.0328 Ellipse_Width=0.0656
    1  0.4         NACA 16-series Chord=0.151244 IdealCl=0.7 ThickChord=0.144074
    2  1           NACA 16-series Chord=0.1066 IdealCl=0.2 ThickChord=0.03
  blade curves as in "Middle Props"

Pod "PodGeom", child of "Lower Wing"
  location (X Y Z) 0.4 1.1 -2.71, rotation 0 0 0
  symmetric about XZ
  bounding box size 2 2.33333 0.133333
  Design: FineRatio=30 Length=2

Fuselage "Outer Ring Guide"
  location (X Y Z) 0 0 0, rotation 0 0 0
  bounding box size 1.42185 6.5 5.42
  Design: Length=1
  cross sections:
    n  XLocPercent  YLocPercent  ZLocPercent  shape
    0  0            0            0            point
    1  0.25         0            0            ellipse Ellipse_Height=5.42 Ellipse_Width=6.5
    2  0.5          0            0            ellipse Ellipse_Height=3 Ellipse_Width=2.5
    3  0.75         0            0            as above
    4  1            0            0            point

Fuselage "Inner Guide"
  location (X Y Z) 0 0 0, rotation 0 0 0
  bounding box size 1 3.5 3.5
  Design: Length=1
  cross sections:
    n  XLocPercent  YLocPercent  ZLocPercent  shape
    0  0            0            0            point
    1  0.25         0            0            ellipse Ellipse_Height=3.5 Ellipse_Width=3.5
    2  0.5          0            0            ellipse Ellipse_Height=3 Ellipse_Width=2.5
    3  0.75         0            0            as above
    4  1            0            0            point

Wing "Top of Frame"
  location (X Y Z) 4.025 0 2.71, rotation 0 0 0
  symmetric about XZ
  bounding box size 2.48979 6.51072 2.80718
  totals: TotalSpan=9.8 TotalProjectedSpan=6.51072 TotalChord=0.7 TotalArea=6.86 TotalAR=6.17923
  root: chord 0.7, twist 0, NACA 4-series Camber=0 CamberLoc=0.2 ThickChord=0.1
  sections:
    n  Span  Root_Chord  Tip_Chord  Area  Sweep  Sweep_Location  Dihedral  Twist  Twist_Location  tip airfoil
    1  1.8   0.7         0.7        1.26  0      0               0         0      0.25            as above
    2  3.1   0.7         0.7        2.17  -30    0               -62       0      0.25            as above

Wing "Lower Frame"
  location (X Y Z) 0.4 0 -2.71, rotation 0 0 0
  symmetric about XZ
  bounding box size 2.54752 6.48569 2.75379
  totals: TotalSpan=9.4 TotalProjectedSpan=6.48569 TotalChord=0.7 TotalArea=6.58 TotalAR=6.39273
  root: chord 0.7, twist 0, NACA 4-series Camber=0 CamberLoc=0.2 ThickChord=0.1
  sections:
    n  Span  Root_Chord  Tip_Chord  Area  Sweep  Sweep_Location  Dihedral  Twist  Twist_Location  tip airfoil
    1  1.5   0.7         0.7        1.05  0      0               0         0      0.25            as above
    2  3.2   0.7         0.7        2.24  30     0               57        0      0.25            as above

Wing "Vertical Stabilizer"
  location (X Y Z) 4 0 0.3, rotation 90 0 0
  bounding box size 1.06066 0.050029 2.4
  totals: TotalSpan=2.4 TotalProjectedSpan=2.4 TotalChord=0.4875 TotalArea=1.29375 TotalAR=4.45217
  root: chord 0.2, twist 0, NACA 4-series Camber=0 CamberLoc=0.2 ThickChord=0.1
  sections:
    n  Span  Root_Chord  Tip_Chord  Area     Sweep  Sweep_Location  Dihedral  Twist  Twist_Location  tip airfoil
    1  0.75  0.2         0.5        0.2625   22.5   0               0         0      0.25            as above
    2  1.65  0.5         0.75       1.03125  0      0               0         0      0.25            NACA 4-series Camber=0 CamberLoc=0.2 ThickChord=0.05

Fuselage "Fuselage"
  location (X Y Z) 0.75 0 0, rotation 0 0 0
  bounding box size 4.34583 0.93104 1.00185
  Design: Length=3.8333
  cross sections:
    n  XLocPercent  YLocPercent  ZLocPercent  shape
    0  0            0            0            edit curve Width=0.9 Height=1 AbsoluteFlag=0 SymType=1 PCHIP points (X Y): 0.5 0, 0.490855 -0.215885, 0.445405 -0.406773, 0.249972 -0.479493, 0 -0.5, -0.249972 -0.479493, -0.445405 -0.406773, -0.490855 -0.215885, -0.5 0, -0.4954 0.27497, -0.390866 0.447678, -0.213613 0.493127, 0 0.5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
    1  0.25         0            0            as above
    2  0.653533     0            0            as above
    3  1            0            0.0652174    edit curve Width=0.8 Height=0.1 AbsoluteFlag=0 SymType=1 linear points (X Y): 0.504566 0.302055, 0.5 -0.5, 0 -0.5, -0.5 -0.5, -0.504566 0.302055, -0.5 0.5, 0 0.5, 0.5 0.5, 0.504566 0.302055
