OpenVSP model (file version 5), 15 components.
Geometry view with OpenVSP parameter names; values to 6 digits, angles in degrees, lengths in the model's unit.
Overall bounding box: X_Min=-6.04094 X_Len=32.8484 Y_Min=-13.9969 Y_Len=27.9939 Z_Min=-2.23906 Z_Len=6.85269

Propeller "PropRight1"
  location (X Y Z) -3.06955 5.31311 -0.530303, rotation 0.009 90 0
  bounding box size 5.17045 5.17045 0.000812173
  Design: Diameter=5.17045 NumBlade=2 Beta34=16.7 UseBeta34Flag=1 Feather=-1.38767 Rotate=0 Precone=0 ReverseFlag=0 FoldAngle=0 PropMode=2 AF=131.031 CLi=0.54059 Chord=0.150128 Solidity=0.0955746 ConstructXoC=0.5 FeatherAxisXoC=0.5 FeatherOffsetXoC=0
  cross sections:
    n  RadiusFrac  shape
    0  0           ellipse Ellipse_Height=0.0987413 Ellipse_Width=0.197483
    1  0.4         NACA 16-series Chord=0.401512 IdealCl=0.7 ThickChord=0.144074
    2  1           NACA 16-series Chord=0.0658275 IdealCl=0.2 ThickChord=0.03
  Chord along r/R (cubic Bezier): 0: 0.0763889, 0.0667: 0.0824484, 0.1334: 0.0919692, 0.2001: 0.0977096, 0.250067: 0.113874, 0.300033: 0.128697, 0.35: 0.141741, 0.396861: 0.153155, 0.443721: 0.169839, 0.490582: 0.178241, 0.493629: 0.235797, 0.496676: 0.179378, 0.499723: 0.182645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
  Twist along r/R (PCHIP): 0: 33.4074, 0.292521: 37.2778, 0.420499: 36.6667, 0.5241: 30.7593, 0.636842: 24.037, 0.795291: 16.0926, 1: 10.3889
  Thick along r/R (cubic Bezier): 0: 0.5, 0.1: 0.3, 0.2: 0.225, 0.3: 0.2, 0.4: 0.125, 0.5: 0.115, 0.6: 0.1, 0.733333: 0.075, 0.866667: 0.055, 1: 0.03
  CLI along r/R (cubic Bezier): 0: 0, 0.133333: 0.7, 0.266667: 0.7, 0.4: 0.7, 0.466667: 0.7, 0.533333: 0.7, 0.6: 0.7, 0.733333: 0.7, 0.866667: 0.7, 1: 0.2

Propeller "PropRight2"
  location (X Y Z) 3.48821 5.31311 -0.530303, rotation 0.009 90 0
  bounding box size 5.17045 5.17045 0.000812173
  Design: Diameter=5.17045 NumBlade=2 Beta34=16.7 UseBeta34Flag=1 Feather=-1.38767 Rotate=0 Precone=0 ReverseFlag=0 FoldAngle=0 PropMode=2 AF=131.031 CLi=0.54059 Chord=0.150128 Solidity=0.0955746 ConstructXoC=0.5 FeatherAxisXoC=0.5 FeatherOffsetXoC=0
  cross sections:
    n  RadiusFrac  shape
    0  0           ellipse Ellipse_Height=0.0987413 Ellipse_Width=0.197483
    1  0.4         NACA 16-series Chord=0.401512 IdealCl=0.7 ThickChord=0.144074
    2  1           NACA 16-series Chord=0.0658275 IdealCl=0.2 ThickChord=0.03
  blade curves as in "PropRight1"

Propeller "PropRight3"
  location (X Y Z) 15.094 5.31311 -0.530303, rotation 0.009 90 0
  bounding box size 5.17045 5.17045 0.000812173
  Design: Diameter=5.17045 NumBlade=2 Beta34=16.7 UseBeta34Flag=1 Feather=-1.38767 Rotate=0 Precone=0 ReverseFlag=0 FoldAngle=0 PropMode=2 AF=131.031 CLi=0.54059 Chord=0.150128 Solidity=0.0955746 ConstructXoC=0.5 FeatherAxisXoC=0.5 FeatherOffsetXoC=0
  cross sections:
    n  RadiusFrac  shape
    0  0           ellipse Ellipse_Height=0.0987413 Ellipse_Width=0.197483
    1  0.4         NACA 16-series Chord=0.401512 IdealCl=0.7 ThickChord=0.144074
    2  1           NACA 16-series Chord=0.0658275 IdealCl=0.2 ThickChord=0.03
  blade curves as in "PropRight1"

Propeller "PropRight4"
  location (X Y Z) 24.157 5.31311 -0.530303, rotation 0.009 90 0
  bounding box size 5.17045 5.17045 0.000812173
  Design: Diameter=5.17045 NumBlade=2 Beta34=16.7 UseBeta34Flag=1 Feather=-1.38767 Rotate=0 Precone=0 ReverseFlag=0 FoldAngle=0 PropMode=2 AF=131.031 CLi=0.54059 Chord=0.150128 Solidity=0.0955746 ConstructXoC=0.5 FeatherAxisXoC=0.5 FeatherOffsetXoC=0
  cross sections:
    n  RadiusFrac  shape
    0  0           ellipse Ellipse_Height=0.0987413 Ellipse_Width=0.197483
    1  0.4         NACA 16-series Chord=0.401512 IdealCl=0.7 ThickChord=0.144074
    2  1           NACA 16-series Chord=0.0658275 IdealCl=0.2 ThickChord=0.03
  blade curves as in "PropRight1"

Propeller "PropLeft1"
  location (X Y Z) -3.45571 -5.31469 -0.530303, rotation 0.009 90 0
  bounding box size 5.17045 5.17045 0.000812173
  Design: Diameter=5.17045 NumBlade=2 Beta34=16.7 UseBeta34Flag=1 Feather=-1.38767 Rotate=0 Precone=0 ReverseFlag=0 FoldAngle=0 PropMode=2 AF=131.031 CLi=0.54059 Chord=0.150128 Solidity=0.0955746 ConstructXoC=0.5 FeatherAxisXoC=0.5 FeatherOffsetXoC=0
  cross sections:
    n  RadiusFrac  shape
    0  0           ellipse Ellipse_Height=0.0987413 Ellipse_Width=0.197483
    1  0.4         NACA 16-series Chord=0.401512 IdealCl=0.7 ThickChord=0.144074
    2  1           NACA 16-series Chord=0.0658275 IdealCl=0.2 ThickChord=0.03
  blade curves as in "PropRight1"

Propeller "PropLeft2"
  location (X Y Z) 3.52082 -5.31469 -0.530303, rotation 0.009 90 0
  bounding box size 5.17045 5.17045 0.000812173
  Design: Diameter=5.17045 NumBlade=2 Beta34=16.7 UseBeta34Flag=1 Feather=-1.38767 Rotate=0 Precone=0 ReverseFlag=0 FoldAngle=0 PropMode=2 AF=131.031 CLi=0.54059 Chord=0.150128 Solidity=0.0955746 ConstructXoC=0.5 FeatherAxisXoC=0.5 FeatherOffsetXoC=0
  cross sections:
    n  RadiusFrac  shape
    0  0           ellipse Ellipse_Height=0.0987413 Ellipse_Width=0.197483
    1  0.4         NACA 16-series Chord=0.401512 IdealCl=0.7 ThickChord=0.144074
    2  1           NACA 16-series Chord=0.0658275 IdealCl=0.2 ThickChord=0.03
  blade curves as in "PropRight1"

Propeller "PropLeft3"
  location (X Y Z) 15.1918 -5.31469 -0.530303, rotation 0.009 90 0
  bounding box size 5.17045 5.17045 0.000812173
  Design: Diameter=5.17045 NumBlade=2 Beta34=16.7 UseBeta34Flag=1 Feather=-1.38767 Rotate=0 Precone=0 ReverseFlag=0 FoldAngle=0 PropMode=2 AF=131.031 CLi=0.54059 Chord=0.150128 Solidity=0.0955746 ConstructXoC=0.5 FeatherAxisXoC=0.5 FeatherOffsetXoC=0
  cross sections:
    n  RadiusFrac  shape
    0  0           ellipse Ellipse_Height=0.0987413 Ellipse_Width=0.197483
    1  0.4         NACA 16-series Chord=0.401512 IdealCl=0.7 ThickChord=0.144074
    2  1           NACA 16-series Chord=0.0658275 IdealCl=0.2 ThickChord=0.03
  blade curves as in "PropRight1"

Propeller "PropLeft4"
  location (X Y Z) 24.2222 -5.31469 -0.530303, rotation 0.009 90 0
  bounding box size 5.17045 5.17045 0.000812173
  Design: Diameter=5.17045 NumBlade=2 Beta34=16.7 UseBeta34Flag=1 Feather=-1.38767 Rotate=0 Precone=0 ReverseFlag=0 FoldAngle=0 PropMode=2 AF=131.031 CLi=0.54059 Chord=0.150128 Solidity=0.0955746 ConstructXoC=0.5 FeatherAxisXoC=0.5 FeatherOffsetXoC=0
  cross sections:
    n  RadiusFrac  shape
    0  0           ellipse Ellipse_Height=0.0987413 Ellipse_Width=0.197483
    1  0.4         NACA 16-series Chord=0.401512 IdealCl=0.7 ThickChord=0.144074
    2  1           NACA 16-series Chord=0.0658275 IdealCl=0.2 ThickChord=0.03
  blade curves as in "PropRight1"

Custom "Booms"
  location (X Y Z) -4.38094 -5.40484 -1.59091, rotation 0 0 0
  symmetric about XZ
  bounding box size 29.2395 11.4578 1.2963
  Design: Height=1.2963 Length=29.2395 SquareFlag=0 Width=0.648148
  custom script Box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

Fuselage "FuselageGeom"
  location (X Y Z) 0 0 0, rotation 0 0 0
  bounding box size 19.1211 4.45455 5.69114
  Design: Length=19.0909
  cross sections:
    n   XLocPercent  YLocPercent  YRotate  ZLocPercent  shape
    0   0            0            14.7273  0            point
    1   0.015113     0            8        0            circle Circle_Diameter=1.27058
    2   0.0893442    0            8        0.015        ellipse Ellipse_Height=3.02273 Ellipse_Width=3.02273
    3   0.163576     0            8        0.0462615    super ellipse Super_Height=4.49432 Super_M=3 Super_MaxWidthLoc=-0.15 Super_N=3 Super_Width=3.57955
    4   0.260716     0            0        0.067        super ellipse Super_Height=5.17045 Super_M=3 Super_MaxWidthLoc=0.05 Super_N=3 Super_Width=4.12893
    5   0.375        0            0        0.0769905    super ellipse Super_Height=5.17045 Super_M=3.5 Super_MaxWidthLoc=0.1 Super_N=3.5 Super_Width=4.45455
    6   0.5          0            -6       0.0887363    super ellipse Super_Height=5.01136 Super_M=3.5 Super_MaxWidthLoc=0 Super_N=3.5 Super_Width=3.97727
    7   0.625        0            -10      0.102703     ellipse Ellipse_Height=4.375 Ellipse_Width=3.5
    8   0.719257     0            -8       0.11         ellipse Ellipse_Height=3.81818 Ellipse_Width=3.18182
    9   0.813514     0            -10      0.12         ellipse Ellipse_Height=3.02273 Ellipse_Width=2.86364
    10  0.89466      0            -5       0.124324     ellipse Ellipse_Height=2.22727 Ellipse_Width=2.38636
    11  0.975807     0            -5       0.14         ellipse Ellipse_Height=1.19318 Ellipse_Width=1.59091
    12  1            0            0        0.14         point

Propeller "PropPusher"
  location (X Y Z) 18.6932 0 2.625, rotation 0 0 0
  bounding box size 0 3.97727 3.97727
  Design: Diameter=3.97727 NumBlade=5 Beta34=17.4359 UseBeta34Flag=1 Feather=-18.9878 Rotate=0 Precone=4.35897 ReverseFlag=0 FoldAngle=0 PropMode=2 AF=149.288 CLi=0.524046 Chord=0.173625 Solidity=0.276333 ConstructXoC=0.974359 FeatherAxisXoC=0 FeatherOffsetXoC=-0.632479
  cross sections:
    n  RadiusFrac  shape
    0  0           ellipse DeltaX=0.2 DeltaY=0.576923 Ellipse_Height=0.0795455 Ellipse_Width=0.159091 Scale=0.938462 ShiftLE=-0.0819111 Theta=-39.7692
    1  0.400001    NACA 16-series Chord=0.366793 IdealCl=0.7 ThickChord=0.200019
    2  1           NACA 16-series Chord=0.258523 IdealCl=0.2 ThickChord=0.03
  Chord along r/R (cubic Bezier): 0: 0.08, 0.2: 0.15, 0.4: 0.2, 0.6: 0.2, 0.716667: 0.2, 0.833333: 0.2, 0.95: 0.2, 0.966667: 0.2, 0.983333: 0.2, 1: 0.13
  Twist along r/R (PCHIP): 0: 46.75, 0.478393: 43.5417, 1: 26.4815
  Sweep along r/R (linear): 0: 0, 1: 0.911574
  Thick along r/R (cubic Bezier): 0: 0.5, 0.133367: 0.3, 0.266733: 0.225, 0.4001: 0.2, 0.466733: 0.125, 0.533367: 0.115, 0.6: 0.1, 0.733333: 0.075, 0.866667: 0.055, 1: 0.03
  CLI along r/R (cubic Bezier): 0: 0, 0.133367: 0.7, 0.266733: 0.7, 0.4001: 0.7, 0.466733: 0.7, 0.533367: 0.7, 0.6: 0.7, 0.733333: 0.7, 0.866667: 0.7, 1: 0.2

Wing "RearSupport"
  location (X Y Z) 16.4567 0.660227 2.22497, rotation 0 0 0
  symmetric about XZ
  bounding box size 2.61986 5.99212 2.92255
  totals: TotalSpan=7.26782 TotalProjectedSpan=4.67167 TotalChord=1.39051 TotalArea=10.106 TotalAR=2.15955
  root: chord 1.41795, twist 0, NACA 4-series Camber=0 CamberLoc=0.2 ThickChord=0.0995475
  sections:
    n  Span     Root_Chord  Tip_Chord  Area   Sweep    Sweep_Location  Dihedral  Twist  Twist_Location  tip airfoil
    1  3.63391  1.41795     1.36307    5.053  19.0779  0               -50       0      0.25            NACA 4-series Camber=0 CamberLoc=0.2 ThickChord=0.1

Wing "Stabilizer"
  location (X Y Z) 16.5434 0 -0.824886, rotation 0 0 0
  symmetric about XZ
  bounding box size 4.1316 14.1408 0.411878
  totals: TotalSpan=14.1408 TotalProjectedSpan=14.1408 TotalChord=2.14983 TotalArea=33.4586 TotalAR=5.97641
  root: chord 4.11639, twist 0, NACA 4-series Camber=0 CamberLoc=0.2 ThickChord=0.1
  sections:
    n  Span     Root_Chord  Tip_Chord  Area     Sweep     Sweep_Location  Dihedral  Twist  Twist_Location  tip airfoil
    1  4.90455  4.11639     1.29996    13.2824  30        0               0         0      0.25            NACA 4-series Camber=0 CamberLoc=0.2 DeltaX=-1 Scale=2 ThickChord=0.1
    2  2.16585  1.29996     1.88301    3.44692  -11.1567  0.5             0         0      0.25            NACA 4-series Camber=0 CamberLoc=0.2 ThickChord=0.1

Wing "FrontSuport"
  location (X Y Z) 0.778162 0.715909 -0.715909, rotation 0 0 0
  symmetric about XZ
  bounding box size 3.54448 10.3535 0.868975
  totals: TotalSpan=8.98864 TotalProjectedSpan=8.92164 TotalChord=2.78409 TotalArea=25.0252 TotalAR=3.18062
  root: chord 3.64632, twist 0, NACA 4-series Camber=0 CamberLoc=0.2 Scale=0.525 ThickChord=0.1
  sections:
    n  Span     Root_Chord  Tip_Chord  Area     Sweep  Sweep_Location  Dihedral  Twist  Twist_Location  tip airfoil
    1  4.49432  3.64632     1.92186    12.5126  -20    0               -7        9      0.25            NACA 4-series Camber=0 CamberLoc=0.2 ThickChord=0.1

Wing "Wing"
  location (X Y Z) 8.17091 0 1.98864, rotation 0 0 0
  symmetric about XZ
  bounding box size 5.3822 27.9939 0.538116
  totals: TotalSpan=27.9939 TotalProjectedSpan=27.9939 TotalChord=4.25287 TotalArea=107.979 TotalAR=7.25751
  root: chord 5.37804, twist 0, NACA 4-series Camber=0 CamberLoc=0.2 ThickChord=0.1
  sections:
    n  Span     Root_Chord  Tip_Chord  Area     Sweep     Sweep_Location  Dihedral  Twist  Twist_Location  tip airfoil
    1  1.54299  5.37804     5.37804    8.29826  0         0               0         0      0.25            as above
    2  1.31298  5.37804     4.73329    6.63797  -0.18182  0               0         0      0.25            as above
    3  7.63629  4.73329     3.01194    29.5724  0         0               0         0      0.25            as above
    4  3.50468  3.01194     2.39841    9.48076  0         0               0         0      0.25            as above

Advanced link "BladePitch"
  input Pitch75R = (not in this file)
  output Pitch1 = (not in this file)
  output Pitch2 = (not in this file)
  output Pitch3 = (not in this file)
    Pitch1 = Pitch75R;
    Pitch2 = Pitch75R;
    Pitch3 = Pitch75R;

Advanced link "BladePitch"
  input Pitch75R = (not in this file)
  output Pitch1 = (not in this file)
  output Pitch2 = (not in this file)
  output Pitch3 = (not in this file)
    Pitch1 = Pitch75R;
    Pitch2 = Pitch75R;
    Pitch3 = Pitch75R;

Advanced link "BladePitch"
  input Pitch75R = (not in this file)
  output Pitch1 = (not in this file)
  output Pitch2 = (not in this file)
  output Pitch3 = (not in this file)
    Pitch1 = Pitch75R;
    Pitch2 = Pitch75R;
    Pitch3 = Pitch75R;

Advanced link "BladePitch"
  input Pitch75R = (not in this file)
  output Pitch1 = (not in this file)
  output Pitch2 = (not in this file)
  output Pitch3 = (not in this file)
    Pitch1 = Pitch75R;
    Pitch2 = Pitch75R;
    Pitch3 = Pitch75R;
